#**************************************************************
# AVL dataset for Untitled Aircraft model
# Generated by AVL Model Editor on 11 Jan 2016
#**************************************************************
Untitled Aircraft
#Mach
 0.0000
#IYsym    IZsym    Zsym
 0        0        0.0000
#Sref     Cref     Bref
#@Auto-generate
 0.3148   0.2066   1.5240


#**************************************************************
# AVL Axes:
#  +X   downstream
#  +Y   out right wing
#  +Z   up
#**************************************************************


#Xref     Yref     Zref
0.1182   0.0000   0.0000
#CDp
0.0000


#**************************************************************
# Surfaces
#**************************************************************


#=============================wing=============================
#@Yduplicate 4 0.00000 wing
SURFACE
Rwing
#Nchord   Cspace   Nspan    Sspace
 12       2.0000   32       0.0000

SCALE
#sX       sY       sZ
 1.0000   1.0000   1.0000

TRANSLATE
#dX       dY       dZ
 0.0000   0.0000   0.0000

ANGLE
#Ainc
 0.0000

INDEX
#Lsurf
 1


#========================wing section 1========================
SECTION
#Xle      Yle      Zle      Chord    Angle
 0.0000   0.0000   0.0000   0.2540   0.0000


#========================wing section 2========================
SECTION
#Xle      Yle      Zle      Chord    Angle
 0.0000   0.0508   0.0000   0.2540   4.0000

AFILE
#Airfoil definition
 HS602.dat

CLAF
#CLaf = CLalpha / (2 * pi)
 1.0000


#========================wing section 3========================
SECTION
#Xle      Yle      Zle      Chord    Angle
 0.1143   0.4064   0.0000   0.1905   4.0000

AFILE
#Airfoil definition
 HS520.dat

CLAF
#CLaf = CLalpha / (2 * pi)
 1.0000

CONTROL
#label     gain     Xhinge   Xhvec    Yhvec    Zhvec    SgnDup
#@Basename elevator
 Relevator 1.0000   0.7000   0.0000   0.0000   0.0000   1


#========================wing section 4========================
SECTION
#Xle      Yle      Zle      Chord    Angle
 0.1778   0.7620   0.0000   0.1778   -5.0000

AFILE
#Airfoil definition
 HS520.dat

CLAF
#CLaf = CLalpha / (2 * pi)
 1.0000

CONTROL
#label     gain     Xhinge   Xhvec    Yhvec    Zhvec    SgnDup
#@Basename elevator
 Relevator 1.0000   0.8000   0.0000   0.0000   0.0000   1


#========================wing (mirror)=========================
#@Ignore
SURFACE
Lwing
#Nchord   Cspace   Nspan    Sspace
 12       2.0000   32       0.0000

SCALE
#sX       sY       sZ
 1.0000   1.0000   1.0000

TRANSLATE
#dX       dY       dZ
 0.0000   0.0000   0.0000

ANGLE
#Ainc
 0.0000

INDEX
#Lsurf
 1


#========================wing section 5========================
SECTION
#Xle      Yle      Zle      Chord    Angle
 0.1778   -0.7620  0.0000   0.1778   -5.0000

AFILE
#Airfoil definition
 HS520.dat

CLAF
#CLaf = CLalpha / (2 * pi)
 1.0000

CONTROL
#label     gain     Xhinge   Xhvec    Yhvec    Zhvec    SgnDup
#@Basename elevator
 Lelevator 1.0000   0.8000   0.0000   0.0000   0.0000   1


#========================wing section 6========================
SECTION
#Xle      Yle      Zle      Chord    Angle
 0.1143   -0.4064  0.0000   0.1905   4.0000

AFILE
#Airfoil definition
 HS520.dat

CLAF
#CLaf = CLalpha / (2 * pi)
 1.0000

CONTROL
#label     gain     Xhinge   Xhvec    Yhvec    Zhvec    SgnDup
#@Basename elevator
 Lelevator 1.0000   0.7000   0.0000   0.0000   0.0000   1


#========================wing section 7========================
SECTION
#Xle      Yle      Zle      Chord    Angle
 0.0000   -0.0508  0.0000   0.2540   4.0000

AFILE
#Airfoil definition
 HS602.dat

CLAF
#CLaf = CLalpha / (2 * pi)
 1.0000


#========================wing section 8========================
SECTION
#Xle      Yle      Zle      Chord    Angle
 0.0000   0.0000   0.0000   0.2540   0.0000


#=============================vert=============================
#@Yduplicate 2 0.00000 vert
SURFACE
Rvert
#Nchord   Cspace   Nspan    Sspace
 12       2.0000   32       0.0000

SCALE
#sX       sY       sZ
 1.0000   1.0000   1.0000

TRANSLATE
#dX       dY       dZ
 0.0000   0.0000   0.0000

ANGLE
#Ainc
 0.0000


#========================vert section 1========================
SECTION
#Xle      Yle      Zle      Chord    Angle
 0.1778   0.7620   0.0000   0.1778   0.0000

NACA
#Airfoil definition
 0010


#========================vert section 2========================
SECTION
#Xle      Yle      Zle      Chord    Angle
 0.2819   0.7620   0.1270   0.0737   0.0000

NACA
#Airfoil definition
 0010


#========================vert (mirror)=========================
#@Ignore
SURFACE
Lvert
#Nchord   Cspace   Nspan    Sspace
 12       2.0000   32       0.0000

SCALE
#sX       sY       sZ
 1.0000   1.0000   1.0000

TRANSLATE
#dX       dY       dZ
 0.0000   0.0000   0.0000

ANGLE
#Ainc
 0.0000


#========================vert section 3========================
SECTION
#Xle      Yle      Zle      Chord    Angle
 0.2819   -0.7620  0.1270   0.0737   0.0000

NACA
#Airfoil definition
 0010


#========================vert section 4========================
SECTION
#Xle      Yle      Zle      Chord    Angle
 0.1778   -0.7620  0.0000   0.1778   0.0000

NACA
#Airfoil definition
 0010
